u := [0; θ_1; 0; θ_2; 0; θ_3]  # error: Эта переменная не определена. Проверьте правильность установки обозначения.
f := [0; -3*Fl; 0; 0; 0; 2*Fl]  # error: Эта переменная не определена. Проверьте правильность установки обозначения.
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k_1 := 5*EI*[
    12/l^3, -6/l^2, -12/l^3, -6/l^2;
    -6/l^2, 4/l, 6/l^2, 2/l;
    -12/l^3, 6/l^2, 12/l^3, 6/l^2;
    -6/l^2, 2/l, 6/l^2, 4/l
]  # error: Эта переменная не определена. Проверьте правильность установки обозначения.
k_2 := 2*EI*[
    12/l^3, -6/l^2, -12/l^3, -6/l^2;
    -6/l^2, 4/l, 6/l^2, 2/l;
    -12/l^3, 6/l^2, 12/l^3, 6/l^2;
    -6/l^2, 2/l, 6/l^2, 4/l
]  # error: Эта переменная не определена. Проверьте правильность установки обозначения.
k := EI*[
    5*12/l^3, 5*(-6/l^2), 5*(-12/l^3), 5*(-6/l^2), 0, 0;
    5*(-6/l^2), 5*4/l, 5*6/l^2, 5*2/l, 0, 0;
    5*(-12/l^3), 5*6/l^2, 5*12/l^3 + 2*12/l^3, 5*6/l^2 + 2*(-6/l^2), 2*(-12/l^3), 2*(-6/l^2);
    5*(-6/l^2), 5*2/l, 5*6/l^2 + 2*(-6/l^2), 5*4/l + 2*4/l, 2*6/l^2, 2*2/l;
    0, 0, 2*(-12/l^3), 2*6/l^2, 2*12/l^3, 2*6/l^2;
    0, 0, 2*(-6/l^2), 2*2/l, 2*6/l^2, 2*4/l
] simplify → [
    60*EI/l^3, -(30*EI)/l^2, -(60*EI)/l^3, -(30*EI)/l^2, 0, 0;
    -(30*EI)/l^2, 20*EI/l, 30*EI/l^2, 10*EI/l, 0, 0;
    -(60*EI)/l^3, 30*EI/l^2, 84*EI/l^3, 18*EI/l^2, -(24*EI)/l^3, -(12*EI)/l^2;
    -(30*EI)/l^2, 10*EI/l, 18*EI/l^2, 28*EI/l, 12*EI/l^2, 4*EI/l;
    0, 0, -(24*EI)/l^3, 12*EI/l^2, 24*EI/l^3, 12*EI/l^2;
    0, 0, -(12*EI)/l^2, 4*EI/l, 12*EI/l^2, 8*EI/l
]
# Составим СЛАУ равновесия
[
    1, 0, 0, 0, 0, 0;
    0, 20*EI/l, 0, 10*EI/l, 0, 0;
    0, 0, 1, 0, 0, 0;
    0, 10*EI/l, 0, 28*EI/l, 0, 4*EI/l;
    0, 0, 0, 0, 1, 0;
    0, 0, 0, 4*EI/l, 0, 8*EI/l
]*[0; θ_1; 0; θ_2; 0; θ_3]
# =
[0; -3*Fl; 0; 0; 0; 2*Fl]
[20*EI/l, 10*EI/l, 0; 10*EI/l, 28*EI/l, 4*EI/l; 0, 4*EI/l, 8*EI/l]^-1*[-3*Fl; 0; 2*Fl] simplify → [-(17*Fl*l)/(105*EI); Fl*l/(42*EI); 5*Fl*l/(21*EI)]
# =
[θ_1; θ_2; θ_3]
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