σ_x1 := 180
τ_yx1 := -70
τ_zx1 := 70
τ_xy1 := -70
σ_y1 := -30
τ_zy1 := 120
σ_т := 300
τ_xz1 := 70
τ_yz1 := 120
σ_z1 := -160
J_1 := σ_x1 + σ_y1 + σ_z1 = -10
J_2 := σ_x1*σ_y1 + σ_y1*σ_z1 + σ_z1*σ_x1 - τ_xy1^2 - τ_xz1^2 - τ_yz1^2 = -53600
J_3 := σ_x1*σ_y1*σ_z1 + 2*τ_xy1*τ_xz1*τ_yz1 - σ_x1*τ_yz1^2 - σ_y1*τ_xz1^2 - σ_z1*τ_xy1^2 = -1973000
x^3 - J_1*x^2 + J_2*x - J_3 == 0 float, solve → [-252.847004666; 38.1136637973; 204.733340869]
σ1_1 := 205
σ2_1 := 38
σ3_1 := -253
σэкв_1 := 1/sqrt(2)*sqrt((σ1_1 - σ2_1)^2 + (σ2_1 - σ3_1)^2 + (σ3_1 - σ1_1)^2) = 401.456
u_т1 := σ_т/σэкв_1 = 0.74728
