σ_x1 := 100
τ_yx1 := -170
τ_zx1 := 80
τ_xy1 := -170
σ_y1 := -60
τ_zy1 := 150
τ_xz1 := 80
τ_yz1 := 150
σ_z1 := 140
[100, -170, 80; -170, -60, 150; 80, -150, 140]
σ_т := 350
J_1 := σ_x1 + σ_y1 + σ_z1 = 180
J_2 := σ_x1*σ_y1 + σ_y1*σ_z1 + σ_z1*σ_x1 - τ_xy1^2 - τ_xz1^2 - τ_yz1^2 = -58200
J_3 := σ_x1*σ_y1*σ_z1 + 2*τ_xy1*τ_xz1*τ_yz1 - σ_x1*τ_yz1^2 - σ_y1*τ_xz1^2 - σ_z1*τ_xy1^2 = -10832000
# Это решение уравнения
x^3 - J_1*x^2 + J_2*x - J_3 == 0 float, solve → [-242.984850777; 199.239460456; 223.745390321]
# 1)
σ1_1 := 224
σ2_1 := 199
σ3_1 := -243
# 2)
σэкв_1 := 1/sqrt(2)*sqrt((σ1_1 - σ2_1)^2 + (σ2_1 - σ3_1)^2 + (σ3_1 - σ1_1)^2) = 455.015
# 3)
u_т1 := σ_т/σэкв_1 = 0.769205
# 4) Т.к. uт < 1 , допускаемое напряжение меньше максимального в рассматриваемой точке, следовательно запас по прочности отсутствует.
# 4) Т.к. uт > 1 , допускаемое напряжение больше максимального в рассматриваемой точке, следовательно запас по прочности имеется.
