σ_x1 := -100
τ_yx1 := -70
τ_zx1 := -100
τ_xy1 := -70
σ_y1 := -180
τ_zy1 := -100
τ_xz1 := -100
τ_yz1 := -100
σ_z1 := 70
[-100, -70, -100; -70, -180, -100; -100, -100, 70]
σ_т := 350
J_1 := σ_x1 + σ_y1 + σ_z1 = -210
J_2 := σ_x1*σ_y1 + σ_y1*σ_z1 + σ_z1*σ_x1 - τ_xy1^2 - τ_xz1^2 - τ_yz1^2 = -26500
J_3 := σ_x1*σ_y1*σ_z1 + 2*τ_xy1*τ_xz1*τ_yz1 - σ_x1*τ_yz1^2 - σ_y1*τ_xz1^2 - σ_z1*τ_xy1^2 = 2317000
# Это решение уравнения
x^3 - J_1*x^2 + J_2*x - J_3 == 0 float, solve → [-275.643535069; -64.5591975622; 130.202732631]
# 1)
σ1_1 := 130
σ2_1 := -65
σ3_1 := -276
# 2)
σэкв_1 := 1/sqrt(2)*sqrt((σ1_1 - σ2_1)^2 + (σ2_1 - σ3_1)^2 + (σ3_1 - σ1_1)^2) = 351.697
# 3)
u_т1 := σ_т/σэкв_1 = 0.995174
# 4) Т.к. uт < 1 , допускаемое напряжение меньше максимального в рассматриваемой точке, следовательно запас по прочности отсутствует.
# 4) Т.к. uт > 1 , допускаемое напряжение больше максимального в рассматриваемой точке, следовательно запас по прочности имеется.
