σ_x1 := 150
τ_yx1 := -20
τ_zx1 := 10
τ_xy1 := -20
σ_y1 := -170
τ_zy1 := -80
τ_xz1 := 10
τ_yz1 := -80
σ_z1 := -120
[150, -20, 10; -20, -170, -80; 10, -80, -120]
σ_т := 200
J_1 := σ_x1 + σ_y1 + σ_z1 = -140
J_2 := σ_x1*σ_y1 + σ_y1*σ_z1 + σ_z1*σ_x1 - τ_xy1^2 - τ_xz1^2 - τ_yz1^2 = -30000
J_3 := σ_x1*σ_y1*σ_z1 + 2*τ_xy1*τ_xz1*τ_yz1 - σ_x1*τ_yz1^2 - σ_y1*τ_xz1^2 - σ_z1*τ_xy1^2 = 2197000
# Это решение уравнения
x^3 - J_1*x^2 + J_2*x - J_3 == 0 float, solve → [-229.09092096; -63.0388177285; 152.129738688]
# 1)
σ1_1 := 152
σ2_1 := -63
σ3_1 := -229
# 2)
σэкв_1 := 1/sqrt(2)*sqrt((σ1_1 - σ2_1)^2 + (σ2_1 - σ3_1)^2 + (σ3_1 - σ1_1)^2) = 330.864
# 3)
u_т1 := σ_т/σэкв_1 = 0.604478
# 4) Т.к. uт < 1 , допускаемое напряжение меньше максимального в рассматриваемой точке, следовательно запас по прочности отсутствует.
# 4) Т.к. uт > 1 , допускаемое напряжение больше максимального в рассматриваемой точке, следовательно запас по прочности имеется.
