σ_x1 := 140
τ_yx1 := -90
τ_zx1 := -40
τ_xy1 := -90
σ_y1 := 60
τ_zy1 := -110
σ_т := 300
[140, -90, -40; -90, 60, -110; -40, -110, 110]
τ_xz1 := -40
τ_yz1 := -110
σ_z1 := 110
J_1 := σ_x1 + σ_y1 + σ_z1 = 310
J_2 := σ_x1*σ_y1 + σ_y1*σ_z1 + σ_z1*σ_x1 - τ_xy1^2 - τ_xz1^2 - τ_yz1^2 = 8600
J_3 := σ_x1*σ_y1*σ_z1 + 2*τ_xy1*τ_xz1*τ_yz1 - σ_x1*τ_yz1^2 - σ_y1*τ_xz1^2 - σ_z1*τ_xy1^2 = -2549000
x^3 - J_1*x^2 + J_2*x - J_3 == 0 float, solve → [-71.2619178914; 166.741483844; 214.520434048]
σ1 := 215
σ2 := 167
σ3 := -71
σ_экв := 1/sqrt(2)*sqrt((σ1 - σ2)^2 + (σ2 - σ3)^2 + (σ3 - σ1)^2) = 265.277
u_т := σ_т/σ_экв = 1.13089
