σ_x := -100
τ_yx := -50
τ_zx := -80
τ_xy := -50
σ_y := -110
τ_zy := 40
τ_xz := -80
τ_yz := 40
σ_z := 40
[-100, -50, -80; -50, -110, 40; -80, 40, 40]
σ_т := 200
J_1 := σ_x + σ_y + σ_z = -170
J_2 := σ_x*σ_y + σ_y*σ_z + σ_z*σ_x - τ_xy^2 - τ_xz^2 - τ_yz^2 = -7900
J_3 := σ_x*σ_y*σ_z + 2*τ_xy*τ_xz*τ_yz - σ_x*τ_yz^2 - σ_y*τ_xz^2 - σ_z*τ_xy^2 = 1524000
# Это решение уравнения
x^3 - J_1*x^2 + J_2*x - J_3 == 0 float, solve → [-159.722492981; -102.954681815; 92.6771747963]
# 1)
σ_1 := 92
σ_2 := -103
σ_3 := -160
# 2)
σ_экв := 1/sqrt(2)*sqrt((σ_1 - σ_2)^2 + (σ_2 - σ_3)^2 + (σ_3 - σ_1)^2) = 228.886
# 3)
u_т := σ_т/σ_экв = 0.873796
# 4) Т.к. u_т < 1 , допускаемое напряжение меньше максимального в рассматриваемой точке, следовательно запас по прочности отсутствует.
# 4) Т.к. u_т > 1 , допускаемое напряжение больше максимального в рассматриваемой точке, следовательно запас по прочности имеется.
