t := 0, 0.01 .. 2 = [
    0; 0.01; 0.02; 0.03; 0.04; 0.05; 0.06; 0.07; 0.08; 0.09
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]
x(t) := -3*t^2 + t + 3
y(t) := -5*t^2 + 5*t/3 + 4
# 1) Построить траекторию
# [plot: y(t) vs x(t)]
# 2) Определить положение точки
t := 1
x(t) = 1
y(t) = 0.666667
clear(t)
# 3) Определить  Vx, Vy, Vr, Vφ, Vτ, V
# ax, ay, ar, aφ, aτ, an, a
# ρ
Vx := d/dt(x(t)) → -(6*t) + 1
ax := d/dt(Vx) → -6
Vy := d/dt(y(t)) → -(10*t) + 5/3
ay := d/dt(Vy) → -10
t := 1
Vx := -6*t + 1 = -5
ax = -6
Vy := -10*t + 5/3 = -8.33333
ay = -10
V := sqrt(Vx^2 + Vy^2) = 9.71825
a := sqrt(ax^2 + ay^2) = 11.6619
r := sqrt(x(t)^2 + y(t)^2) simplify → sqrt(13)/3
Vr := (x(t)*Vx + y(t)*Vy)/r simplify; max → -8.7827531069 = -8.78275
Vφ := r*(x(t)*Vy + y(t)*Vx)/r^2 = -9.70725
Vτ := sqrt(V^2) = 9.71825
ar := (Vx^2 + x(t)*ax + Vy^2 + y(t)*ay - Vr^2)/r - r*((x(t)*Vy + y(t)*Vx)/r^2)^2 = -74.5432
aφ := 2*Vr*(x(t)*Vy + y(t)*Vx)/r^2 + r*(x(t)*ay - y(t)*ax - 2*r*Vr*(x(t)*Vy + y(t)*Vx)/r^2)/r^2
aφ = -4.9923
