VAX := READPRN(".\lab_Direct.DNO")
VAX = [
    2.84398e-5, -1.42213e-5;
    0.0400242, -1.41095e-5;
    0.08002, -1.3996e-5;
    0.120016, -1.38783e-5;
    0.160012, -1.37509e-5;
    0.200007, -1.36023e-5;
    0.240003, -1.34089e-5;
    0.279998, -1.31211e-5;
    0.319993, -1.26318e-5;
    0.359987, -1.16945e-5
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]
VAX[:, 0] = [
    2.84398e-5; 0.0400242; 0.08002; 0.120016; 0.160012; 0.200007; 0.240003; 0.279998; 0.319993; 0.359987
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]
VAX[:, 1] = [
    -1.42213e-5; -1.41095e-5; -1.3996e-5; -1.38783e-5; -1.37509e-5; -1.36023e-5; -1.34089e-5; -1.31211e-5; -1.26318e-5; -1.16945e-5
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]
# [plot: VAX[:, 1] vs VAX[:, 0]]
I_d3 := max(VAX[:, 1]) = 0.121974
n_MAX := match(I_d3, VAX[:, 1]) = [50]
U_d3 := VAX[:, 0][50, :] = [1.75588]
n_Id1 := match(I_d3/4, VAX[:, 1]) = [25]
I_d1 := VAX[:, 1][25, :] = [0.0301485]
U_d2 := linterp(VAX[:, 1], VAX[:, 0], I_d3/2) = 1.21985
U_d1 := VAX[:, 0][25, :] = [0.939609]
I_d2 := I_d3/2 = 0.0609872
R_b := (U_d1 - 2*U_d2 + U_d3)/I_d1 = 8.4839
NF_t := (3*U_d2 - 2*U_d1 - U_d3)/ln(2) = [0.0352994]
I_so := I_d1*e^((U_d2 - 2*U_d1)/NF_t) = [2.32804e-10]
# U | I
y_1 := U_d1
x_1 := I_d1
y_2 := U_d2
x_2 := I_d2
y_3 := U_d3
x_3 := I_d3
y_4 := 0.671
x_4 := 0.004
solve block
    # guess values
    R_b := 1
    I_s0 := 10^-10
    m := 2
    F_t := 0.02
    # constraints
    y_1 == x_1*R_b + ln((I_s0 + x_1)/I_s0)*m*F_t
    y_2 == x_2*R_b + ln((I_s0 + x_2)/I_s0)*m*F_t
    y_3 == x_3*R_b + ln((I_s0 + x_3)/I_s0)*m*F_t
    y_4 == x_4*R_b + ln((I_s0 + x_4)/I_s0)*m*F_t
    # solver
    Diod_P := Minerr(I_s0, R_b, m, F_t)
end solve block
Diod_P = [0; 8.54186; 1.50297; 0.0150616]
R_b := 1
NFt := 0.0255
I_s0 := 10^-14
I_proverka := 0, 10^-5 .. 0.023 = [
    0; 1e-5; 2e-5; 3e-5; 4e-5; 5e-5; 6e-5; 7e-5; 8e-5; 9e-5
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]
U_proverka := I_proverka*R_b + NFt*ln((I_proverka + I_s0)/I_s0) = [
    0; 0.528453; 0.546139; 0.556488; 0.563834; 0.569534; 0.574193; 0.578134; 0.581549; 0.584563
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]
# [plot: I_proverka vs U_proverka]
Rb1 := 1.2
NFt1 := 0.0255
Is01 := 22.7*10^6
Idiod := 0, 10^-5 .. 0.023
Uformula(Idiod) := Idiod*Rb1 + NFt1*ln((Idiod + Is01)/Is01)
VAX := READPRN(".\lab_Direct.DNO")
Idiod := VAX[:, 1]
VAX[:, 0] = [
    2.84398e-5; 0.0400242; 0.08002; 0.120016; 0.160012; 0.200007; 0.240003; 0.279998; 0.319993; 0.359987
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]
VAX[:, 1] = [
    -1.42213e-5; -1.41095e-5; -1.3996e-5; -1.38783e-5; -1.37509e-5; -1.36023e-5; -1.34089e-5; -1.31211e-5; -1.26318e-5; -1.16945e-5
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]
Idiod = [
    -1.42213e-5; -1.41095e-5; -1.3996e-5; -1.38783e-5; -1.37509e-5; -1.36023e-5; -1.34089e-5; -1.31211e-5; -1.26318e-5; -1.16945e-5
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]
VAX[:, 0][45] = 1.59319
Iproverka := VAX[:, 1][45] = 0.103327
Uformula(Iproverka) = 0.123993
# [plot: VAX[:, 1], Uformula(Idiod) vs VAX[:, 0]]
