VAX := READPRN(".\lab_Direct.DNO")
VAX = [
    0, 0;
    0.0175187, 0.00248477;
    0.0342673, 0.0057396;
    0.05011, 0.00990003;
    0.064938, 0.015075;
    0.0786835, 0.0213322;
    0.0913258, 0.0286925;
    0.102888, 0.0371323;
    0.113428, 0.0465947;
    0.123023, 0.0570011
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]
VAX[:, 0] = [
    0; 0.0175187; 0.0342673; 0.05011; 0.064938; 0.0786835; 0.0913258; 0.102888; 0.113428; 0.123023
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]
VAX[:, 1] = [
    0; 0.00248477; 0.0057396; 0.00990003; 0.015075; 0.0213322; 0.0286925; 0.0371323; 0.0465947; 0.0570011
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]
# [plot: VAX[:, 1] vs VAX[:, 0]]
I_d1 := VAX[:, 1][18, :] = [0.179723]
I_d2 := VAX[:, 1][29, :] = [0.363698]
I_d3 := max(VAX[:, 1]) = 0.747247
U_d1 := VAX[:, 0][18, :] = [0.180313]
U_d2 := VAX[:, 0][29, :] = [0.216346]
U_d3 := VAX[:, 0][50, :] = [0.252804]
R_b := (U_d1 - 2*U_d2 + U_d3)/I_d1 = 0.00236778
NF_t := (3*U_d2 - 2*U_d1 - U_d3)/ln(2) = [0.0513705]
I_so := I_d1*exp((U_d2 - 2*U_d1)/NF_t) = [0.0108353]
solve block
    # guess values
    R_b := 1
    I_s0 := 10^-10
    m := 2
    F_t := 0.02
    # constraints
    0.2528 == 0.74715*R_b + ln((I_s0 + 0.74715)/I_s0)*m*F_t
    0.16557 == 0.1344*R_b + ln((I_s0 + 0.1344)/I_s0)*m*F_t
    0.12302 == 0.05695*R_b + ln((I_s0 + 0.05695)/I_s0)*m*F_t
    0.10289 == 0.03709*R_b + ln((I_s0 + 0.03709)/I_s0)*m*F_t
    # solver
    Diod_Calc := Minerr(I_s0, R_b, m, F_t)
end solve block
Diod_Calc = [8.06173e-5; 0.119419; 0.682047; 0.0265592]
Rb := 0.11942
NFt := 0.68205*0.02656 = 0.0181152
Is0 := 0.00008
I_proverka := 0, 10^-5 .. 0.023 = [
    0; 1e-5; 2e-5; 3e-5; 4e-5; 5e-5; 6e-5; 7e-5; 8e-5; 9e-5
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]
U_proverka := I_proverka*Rb + NFt*ln((I_proverka + Is0)/Is0) = [
    0; 0.00213486; 0.00404469; 0.00577245; 0.00734988; 0.00880107; 0.0101447; 0.0113958; 0.0125661; 0.0136655
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]
# [plot: I_proverka vs U_proverka]
Rb1 := 0.91942
NFt1 := 0.010812
Is01 := 0.01008
Icheck := 0, 10^-5 .. 0.023
Ucheck(Icheck) := Icheck*Rb1 + NFt1*ln((Icheck + Is01)/Is01)
VAX := READPRN(".\lab_Direct.DNO")
Icheck := VAX[:, 1]
VAX[:, 0] = [
    0; 0.0175187; 0.0342673; 0.05011; 0.064938; 0.0786835; 0.0913258; 0.102888; 0.113428; 0.123023
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]
VAX[:, 1] = [
    0; 0.00248477; 0.0057396; 0.00990003; 0.015075; 0.0213322; 0.0286925; 0.0371323; 0.0465947; 0.0570011
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]
Icheck = [
    0; 0.00248477; 0.0057396; 0.00990003; 0.015075; 0.0213322; 0.0286925; 0.0371323; 0.0465947; 0.0570011
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]
VAX[:, 0][45] = 0.24611
Iapprove := VAX[:, 1][45] = 0.653939
Ucheck(Iapprove) = 0.646522
# [plot: VAX[:, 1], Ucheck(Icheck) vs VAX[:, 0]]
