L := 10^-4
C := 10*10^-12
ω_0 := 1/(2*π*sqrt(L*C)) = 5032921
ω_1 := ω_0 - 1*10^6 = 4032921
solve block
    # guess values
    L_1 := 10^-3
    # constraints
    ω_1 == 1/(2*π*sqrt((L + L_1)*C))
    # solver
    L_1 := find(L_1) = 5.57402e-5
end solve block
ω := 39.427*0.7 = 27.5989
f0 := ω_1
f1 := 3979746
f2 := 4084128
Q := f0/(f2 - f1) = 38.6362
