VFX := [
    0, 282763.803;
    -3, 372577.880;
    -6, 400632.578;
    -9, 416183.365;
    -12, 426478.980;
    -15, 433969.623;
    -18, 439707.397;
    -21, 444342.140
]
# [plot: VFX[:, 1] vs VFX[:, 0]]
F_r == 1/(2*π*sqrt((C_k + C_d)*L_k))
C_k := 10^-10
L_k := 10^-3
F_r := VFX[:, 1]
C_d := -(C_k*L_k - 1/(4*F_r^2*π^2))/L_k = [2.16805e-10; 8.24762e-11; 5.78148e-11; 4.62416e-11; 3.9266e-11; 3.44998e-11; 3.10125e-11; 2.82937e-11]
# [plot: C_d vs VFX[:, 0]]
C_d(U) == C_j0*(1 - U/V_j0)^(-M)
solve block
    # guess values
    M := 0.5
    V_j0 := 0.5
    C_j0 := 10^-12
    # constraints
    2.168*10^-10 == C_j0*(1 - 0/V_j0)^(-M)
    3.927*10^-11 == C_j0*(1 - (-12/V_j0))^(-M)
    2.829*10^-11 == C_j0*(1 - (-21/V_j0))^(-M)
    # solver
    Minerr(M, V_j0, C_j0) = [0.615863; 0.798645; 2.168e-10]
end solve block
solve block
    # guess values
    M := 0.5
    V_j0 := 0.5
    C_j0 := 10^-12
    # constraints
    2.168*10^-10 == C_j0*(1 - 0/V_j0)^(-M)
    3.927*10^-11 == C_j0*(1 - (-12/V_j0))^(-M)
    2.829*10^-11 == C_j0*(1 - (-21/V_j0))^(-M)
    find(M, V_j0, C_j0) = [0.615863; 0.798645; 2.168e-10]
end solve block
