# 8 variant
#
# Rb - объемное сопротивление базы
# I0 - Обратный ток перехода
# NFt - Тепловой потенциал
Ud1 := 0.397
Id1 := 5*10^-3
Ud2 := 0.433
Id2 := 10*10^-3
Ud3 := 0.472
Id3 := 20*10^-3
Rb := (Ud1 - 2*Ud2 + Ud3)/Id1 = 0.6
NFt := (3*Ud2 - 2*Ud1 - Ud3)/ln(2) = 0.0476089
I0 := Id1*exp((Ud3 - 2*Ud2)/NFt) = 1.27308e-6
Id := 0, 0.01 .. 1
Ud(Id) := Id*Rb + NFt*ln((Id + I0)/I0)
# [plot: Id vs Ud(Id)]
# Легирование полупроводников — внедрение небольших количеств примесей или структурных дефектов с целью контролируемого изменения электрических свойств полупроводника, в частности, его типа проводимости.
# Чтобы получить электронно-дырочный переход (p-n-переход), нужно в одном и том же кристалле полупроводника образовать тоненькую границу полупроводника с разными типами проводимости.
# Контактная разность потенциалов — это разность потенциалов, возникающая при соприкосновении двух различных твердых проводников, имеющих одинаковую температуру.
