Uист := 1
Udiod := 0.7
Idiod := 0.02268
R := (Uист - Udiod)/Idiod = 13.2275
VFX := [-1, 502939; -5.75, 503794; -10.5, 504072; -15.25, 504228; -20, 504339]
# [plot: VFX[:, 1] vs VFX[:, 0]]
F_r == 1/(2*π*sqrt((C_k + C_d)*L_k))
C_k := 10^-10
L_k := 10^-3
F_r := VFX[:, 1]
C_d := -(C_k*L_k - 1/(4*F_r^2*π^2))/L_k = [1.40472e-13; -1.99141e-13; -3.09192e-13; -3.70868e-13; -4.14718e-13]
# [plot: C_d vs VFX[:, 0]]
C_d(U) == C_j0*(1 - U/V_j0)^(-M)
solve block
    # guess values
    M := 0.5
    V_j0 := 0.5
    C_j0 := 10^-12
    # constraints
    2.168*10^-10 == C_j0*(1 - 0/V_j0)^(-M)
    3.93*10^-11 == C_j0*(1 - (-12/V_j0))^(-M)
    2.823*10^-11 == C_j0*(1 - (-21/V_j0))^(-M)
    # solver
    Minerr(M, V_j0, C_j0) = [0.622253; 0.824389; 2.168e-10]
end solve block
solve block
    # guess values
    M := 0.5
    V_j0 := 0.5
    C_j0 := 10^-12
    # constraints
    2.168*10^-10 == C_j0*(1 - 0/V_j0)^(-M)
    3.93*10^-11 == C_j0*(1 - (-12/V_j0))^(-M)
    2.823*10^-11 == C_j0*(1 - (-21/V_j0))^(-M)
    find(M, V_j0, C_j0) = [0.615863; 0.798645; 2.168e-10]
end solve block
