Uист := 1
Udiod := 0.7
Idiod := 0.006611
R := (Uист - Udiod)/Idiod = 45.3789
VFX := [
    0, 282782.8;
    -3, 372622.6;
    -6, 400650.7;
    -9, 416166.2;
    -12, 426426.4;
    -15, 433933.9;
    -18, 439689.7;
    -21, 444444.4
]
# [plot: VFX[:, 1] vs VFX[:, 0]]
F_r == 1/(2*π*sqrt((C_k + C_d)*L_k))
C_k := 10^-10
L_k := 10^-3
F_r := VFX[:, 1]
C_d := -(C_k*L_k - 1/(4*F_r^2*π^2))/L_k = [2.16763e-10; 8.24324e-11; 5.78005e-11; 4.62536e-11; 3.93003e-11; 3.45219e-11; 3.1023e-11; 2.82346e-11]
# [plot: C_d vs VFX[:, 0]]
C_d(U) == C_j0*(1 - U/V_j0)^(-M)
solve block
    # guess values
    M := 0.5
    V_j0 := 0.5
    C_j0 := 10^-12
    # constraints
    2.168*10^-10 == C_j0*(1 - 0/V_j0)^(-M)
    3.93*10^-11 == C_j0*(1 - (-12/V_j0))^(-M)
    2.823*10^-11 == C_j0*(1 - (-21/V_j0))^(-M)
    # solver
    Minerr(M, V_j0, C_j0) = [0.622253; 0.824389; 2.168e-10]
end solve block
solve block
    # guess values
    M := 0.5
    V_j0 := 0.5
    C_j0 := 10^-12
    # constraints
    2.168*10^-10 == C_j0*(1 - 0/V_j0)^(-M)
    3.93*10^-11 == C_j0*(1 - (-12/V_j0))^(-M)
    2.823*10^-11 == C_j0*(1 - (-21/V_j0))^(-M)
    find(M, V_j0, C_j0) = [0.615863; 0.798645; 2.168e-10]
end solve block
