Rk := 510
Ek := 5
Uinput := 5
Ik := 5/510 = 0.00980392
Bf := 104.131
Ukenas := 0.2
Ube := 0.9
Iknas := (Ek - Ukenas)/Rk = 0.00941176
Ibnas := Iknas/Bf = 9.03839e-5
S := 1
Rb := (Uinput - Ube)/(S*Ibnas) = 45362.1
S := 2
Rb := (Uinput - Ube)/(S*Ibnas) = 22681
S := 5
Rb := (Uinput - Ube)/(S*Ibnas) = 9072.41
S := 20
Rb := (Uinput - Ube)/(S*Ibnas) = 2268.1
