Rk := 510
Ek := 5
Uinput := 5
Ik := 5/510 = 0.00980392
Bf := 355.910
Ukenas := 0.2
Ube := 0.9
Iknas := (Ek - Ukenas)/Rk = 0.00941176
Ibnas := Iknas/Bf = 2.64442e-5
S := 1
Rb := (Uinput - Ube)/(S*Ibnas) = 155043
S := 2
Rb := (Uinput - Ube)/(S*Ibnas) = 77521.6
S := 5
Rb := (Uinput - Ube)/(S*Ibnas) = 31008.7
S := 20
Rb := (Uinput - Ube)/(S*Ibnas) = 7752.16
