Rk := 510
Ek := 5
Uinput := 5
Ik := 5/510 = 0.00980392
Bf := 115.524
Ukenas := 0.2
Ube := 0.9
Iknas := (Ek - Ukenas)/Rk = 0.00941176
Ibnas := Iknas/Bf = 8.14702e-5
S := 1
Rb := (Uinput - Ube)/(S*Ibnas) = 50325.1
S := 2
Rb := (Uinput - Ube)/(S*Ibnas) = 25162.6
S := 5
Rb := (Uinput - Ube)/(S*Ibnas) = 10065
S := 20
Rb := (Uinput - Ube)/(S*Ibnas) = 2516.26
