Rk := 510
Ek := 5
Uinput := 5
Ik := 5/510 = 0.00980392
Bf := 100.963
Ukenas := 0.2
Ube := 0.9
Iknas := (Ek - Ukenas)/Rk = 0.00941176
Ibnas := Iknas/Bf = 9.32199e-5
S := 1
Rb := (Uinput - Ube)/(S*Ibnas) = 43982
S := 2
Rb := (Uinput - Ube)/(S*Ibnas) = 21991
S := 5
Rb := (Uinput - Ube)/(S*Ibnas) = 8796.4
S := 20
Rb := (Uinput - Ube)/(S*Ibnas) = 2199.1
