Rk := 510
Ek := 5
Uinput := 5
Ik := 5/510 = 0.00980392
Bf := 31.436
Ukenas := 0.2
Ube := 1
Iknas := (Ek - Ukenas)/Rk = 0.00941176
Ibnas := Iknas/Bf = 0.000299394
S := 1
Rb := (Uinput - Ube)/(S*Ibnas) = 13360.3
S := 2
Rb := (Uinput - Ube)/(S*Ibnas) = 6680.15
S := 5
Rb := (Uinput - Ube)/(S*Ibnas) = 2672.06
S := 20
Rb := (Uinput - Ube)/(S*Ibnas) = 668.015
