Rk := 510
Ek := 5
Uinput := 5
Ik := 5/510 = 0.00980392
Bf := 79.234
Ukenas := 0.2
Ube := 1
Iknas := (Ek - Ukenas)/Rk = 0.00941176
Ibnas := Iknas/Bf = 0.000118784
S := 1
Rb := (Uinput - Ube)/(S*Ibnas) = 33674.4
S := 2
Rb := (Uinput - Ube)/(S*Ibnas) = 16837.2
S := 5
Rb := (Uinput - Ube)/(S*Ibnas) = 6734.89
S := 20
Rb := (Uinput - Ube)/(S*Ibnas) = 1683.72
