Rk := 510
Ek := 5
Uinput := 5
Ik := 5/510 = 0.00980392
Bf := 189*.204
Ukenas := 0.2
Ube := 1
Iknas := (Ek - Ukenas)/Rk = 0.00941176
Ibnas := Iknas/Bf = 0.000244106
S := 1
Rb := (Uinput - Ube)/(S*Ibnas) = 16386.3
S := 2
Rb := (Uinput - Ube)/(S*Ibnas) = 8193.15
S := 5
Rb := (Uinput - Ube)/(S*Ibnas) = 3277.26
S := 20
Rb := (Uinput - Ube)/(S*Ibnas) = 819.315
