Rk := 510
Ek := 5
Uinput := 5
Ik := 5/510 = 0.00980392
Bf := 50.133
Ukenas := 0.2
Ube := 1
Iknas := (Ek - Ukenas)/Rk = 0.00941176
Ibnas := Iknas/Bf = 0.000187736
S := 1
Rb := (Uinput - Ube)/(S*Ibnas) = 21306.5
S := 2
Rb := (Uinput - Ube)/(S*Ibnas) = 10653.3
S := 5
Rb := (Uinput - Ube)/(S*Ibnas) = 4261.31
S := 20
Rb := (Uinput - Ube)/(S*Ibnas) = 1065.33
