x_1 := 0
x_2 := 1/2
l_1 := (x - x_2)/(x_1 - x_2) simplify → -(2*x) + 1
l_2 := (x - x_1)/(x_2 - x_1) simplify → 2*x
l'_1 := d/dx((x - x_2)/(x_1 - x_2)) simplify → -2
l'_2 := d/dx((x - x_1)/(x_2 - x_1)) simplify → 2
h_1 := (1 - 2*(x - x_1)*l'_1)*l_1^2 simplify; expand → 16*x^3 - 12*x^2 + 1
h_2 := (1 - 2*(x - x_2)*l'_2)*l_2^2 simplify; expand → -(16*x^3) + 12*x^2
h_1g := (x - x_1)*l_1^2 simplify; expand → 4*x^3 - 4*x^2 + x
h_2g := (x - x_2)*l_2^2 simplify; expand → 4*x^3 - 2*x^2
f(x) := e^(2*x)
f'(x) := d/dx(f(x)) → 2*e^(2*x)
f_x_1 := 1
f_x_2 := e
f'_x_1 := 2
f'_x_2 := 2*e
H_3(x) := (f_x_1*h_1 + f_x_2*h_2) + (f'_x_1*h_1g + f'_x_2*h_2g) simplify → (-(8*x^3) + 8*x^2)*e + 24*x^3 - 20*x^2 + 2*x + 1
x := -0.5, -0.49 .. 1
# [plot: f(x), H_3(x) vs x]
